// COMSOL Multiphysics 5.6.0.280 model "piezoelectric_transmitter_receiver_56.mph"
// Modeling Piezoelectric Devices as Both Transmitters and Receivers: Terminal
// Outline of the model tree

Parameters
  f0 = 0.5[MHz]  // Signal center frequency
  T0 = 1/f0  // Signal period
  lam0 = 1480[m/s]/f0  // Wavelength at f0
  fmax = 2*f0  // Maximum frequency solved for
  pzt_cs = 1714[m/s]  // Speed of shear waves in the piezoelectric material
  water_cp = 1481[m/s]  // Speed of pressue waves in water
  A = 100 [V]  // Amplitude of the signal

Functions
  an1: Analytic "V_1_signal" | expr = A*exp(-((t-1.5*T0)/(T0/2))^2)*sin(2*pi*f0*t); args = t; argunit = s; fununit = V
  an2: Analytic "V_2 signal" | expr = A*exp(-((t-1.5*T0)/(T0/2))^2); args = t; argunit = s; fununit = V

Probes
  point1: Point "Point Probe 1" on points 2
    probename = point_pressure
    expr = actd.p_t
    unit = Pa
    descr = Total acoustic pressure
    frame = spatial
    axisym = 2d
    table = tbl1
  var1: GlobalVariable "Global Variable Probe 1"
    probename = terminal_voltage
    expr = es.V0_1
    unit = V
    descr = Terminal voltage
    table = tbl2

Coordinate systems
  pml1: PML "Perfectly Matched Layer 1" on domains 3 | ScalingType = Cylindrical; stretchingType = rational; PMLfactor = 3

Common definitions
  mpf1: ParticipationFactors

Geometry
  geom1 "Geometry 1" (2D axisymmetric, length unit mm)
    r1: Rectangle | pos = {0, -1}; size = {2, 1}
    r2: Rectangle | layername = Layer 1; layer = 5; layerright = on; layerbottom = off; size = {12, 15}
    e1: Ellipse | pos = {0, 14}; semiaxes = {6, 2.5}; angle = 90
    uni2: Union | input = e1, r2
    del1: Delete "Delete Entities 1" | input = uni2(1) boundaries 4, 6, 13
    fin: Finalize "Form Union"
    igv1: IgnoreVertices | input = fin(1) points 3, 4

Materials
  mat4: Common "Water, liquid" on domains 2, 3
    def "Basic"
      dynamicviscosity = eta(T[1/K])[Pa*s]
      ratioofspecificheat = 1.0
      electricconductivity = 5.5e-6[S/m]
      heatcapacity = Cp(T[1/K])[J/(kg*K)]
      density = rho(T[1/K])[kg/m^3]
      thermalconductivity = k(T[1/K])[W/(m*K)]
      soundspeed = cs(T[1/K])[m/s]
      eta: Piecewise
        arg = T
        pieces = 
          {273.15, 413.15, 1.3799566804-0.021224019151*T^1+1.3604562827E-4*T^2-4.6454090319E-7*T^3+8.9042735735E-10*T^4-9.0790692686E-13*T^5+3.8457331488E-16*T^6}
          {413.15, 553.75, 0.00401235783-2.10746715E-5*T^1+3.85772275E-8*T^2-2.39730284E-11*T^3}
      Cp: Piecewise | arg = T; pieces = {273.15, 553.75, 12010.1471-80.4072879*T^1+0.309866854*T^2-5.38186884E-4*T^3+3.62536437E-7*T^4}
      rho: Piecewise | arg = T; pieces = {273.15, 553.75, 838.466135+1.40050603*T^1-0.0030112376*T^2+3.71822313E-7*T^3}
      k: Piecewise | arg = T; pieces = {273.15, 553.75, -0.869083936+0.00894880345*T^1-1.58366345E-5*T^2+7.97543259E-9*T^3}
      cs: Interpolation | table = {{273, 1403}, {278, 1427}, {283, 1447}, {293, 1481}, {303, 1507}, {313, 1526}, {323, 1541}, {333, 1552}, {343, 1555}, {353, 1555}, {363, 1550}, {373, 1543}}; interp = piecewisecubic
  mat2: Common "Lead Zirconate Titanate (PZT-5H)" on domains 1
    def "Basic"
      relpermittivity = diag{1704.4, 1704.4, 1433.6}
      density = 7500[kg/m^3]
    StrainCharge "Strain-charge form"
      sE = {1.65e-011[1/Pa], -4.78e-012[1/Pa], -8.45e-012[1/Pa], 0[1/Pa], 0[1/Pa], 0[1/Pa], -4.78e-012[1/Pa], 1.65e-011[1/Pa], -8.45e-012[1/Pa], 0[1/Pa], 0[1/Pa], 0[1/Pa], -8.45e-012[1/Pa], -8.45e-012[1/Pa], 2.07e-011[1/Pa], 0[1/Pa], 0[1/Pa], 0[1/Pa], 0[1/Pa], 0[1/Pa], 0[1/Pa], 4.35e-011[1/Pa], 0[1/Pa], 0[1/Pa], 0[1/Pa], 0[1/Pa], 0[1/Pa], 0[1/Pa], 4.35e-011[1/Pa], 0[1/Pa], 0[1/Pa], 0[1/Pa], 0[1/Pa], 0[1/Pa], 0[1/Pa], 4.26e-011[1/Pa]}
      dET = {0[C/N], 0[C/N], -2.74e-010[C/N], 0[C/N], 0[C/N], -2.74e-010[C/N], 0[C/N], 0[C/N], 5.93e-010[C/N], 0[C/N], 7.41e-010[C/N], 0[C/N], 7.41e-010[C/N], 0[C/N], 0[C/N], 0[C/N], 0[C/N], 0[C/N]}
      epsilonrT = diag{3130, 3130, 3400}
      eta_sE = {0, 0, 0, 0, 0, 0, 0, 0, 0, 0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}
      eta_dET = {0, 0, 0, 0, 0, 0, 0, 0, 0, 0, 0, 0, 0, 0, 0, 0, 0, 0}
      eta_epsilonT = 0
    StressCharge "Stress-charge form"
      cE = {1.27205e+011[Pa], 8.02122e+010[Pa], 8.46702e+010[Pa], 0[Pa], 0[Pa], 0[Pa], 8.02122e+010[Pa], 1.27205e+011[Pa], 8.46702e+010[Pa], 0[Pa], 0[Pa], 0[Pa], 8.46702e+010[Pa], 8.46702e+010[Pa], 1.17436e+011[Pa], 0[Pa], 0[Pa], 0[Pa], 0[Pa], 0[Pa], 0[Pa], 2.29885e+010[Pa], 0[Pa], 0[Pa], 0[Pa], 0[Pa], 0[Pa], 0[Pa], 2.29885e+010[Pa], 0[Pa], 0[Pa], 0[Pa], 0[Pa], 0[Pa], 0[Pa], 2.34742e+010[Pa]}
      eES = {0[C/m^2], 0[C/m^2], -6.62281[C/m^2], 0[C/m^2], 0[C/m^2], -6.62281[C/m^2], 0[C/m^2], 0[C/m^2], 23.2403[C/m^2], 0[C/m^2], 17.0345[C/m^2], 0[C/m^2], 17.0345[C/m^2], 0[C/m^2], 0[C/m^2], 0[C/m^2], 0[C/m^2], 0[C/m^2]}
      epsilonrS = diag{1704.4, 1704.4, 1433.6}
      eta_cE = {0, 0, 0, 0, 0, 0, 0, 0, 0, 0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}
      eta_eES = {0, 0, 0, 0, 0, 0, 0, 0, 0, 0, 0, 0, 0, 0, 0, 0, 0, 0}
      eta_epsilonS = 0

Physics
  actd: TransientPressureAcoustics "Pressure Acoustics, Transient" on domains 2, 3
    dependent variable p
    cref.cref = 1480[m/s]
    TransientSettings.fmax = fmax
    tpam1: TransientPressureAcousticsModel (default)
    axi1: AxialSymmetry (default)
    shb1: SoundHard "Sound Hard Boundary (Wall) 1" (default)
    init1: init "Initial Values 1" (default)
  solid: SolidMechanics on domains 1
    dependent variable u = {u, v, w}
    TransientSettings.fmax = fmax
    TransientSettings.SetMaximumFrequency = 1
    lemm1: LinearElasticModel "Linear Elastic Material 1" (default)
    axi1: AxialSymmetrySolid "Axial Symmetry 1" (default)
    free1: Free (default)
    init1: init "Initial Values 1" (default)
    pzm1: PiezoelectricMaterialModel "Piezoelectric Material 1" on domains 1-3 | ForceLinearStrainRes = 1
    lrb1: LowReflectingBoundary on boundaries 2
  es: Electrostatics on domains 1
    dependent variable V
    PortSweepSettings.PortParamName = PortName
    ccn1: ChargeConservation (default) | minput_numberdensity = 0
    axi1: AxialSymmetry (default)
    zc1: ZeroCharge (default)
    init1: init "Initial Values 1" (default)
    ccnp1: ChargeConservationPiezo "Charge Conservation, Piezoelectric 1" on all domains
    gnd1: Ground on boundaries 2
    term1: Terminal on boundaries 4 | TerminalType = Circuit
  cir: Circuit "Electrical Circuit"
    dependent variable voltages
    gnd1: GroundNode
    V1: VoltageSource "Voltage Source V1"
      Connections = {1, 0}
      sourceType = DC
      value = A*exp(-((t-1.5*T0)/(T0/2))^2)
      freq = f0
    R1: Resistor "Resistor R1" | Connections = {1, 2}
    termI1: ModelTerminalIV "External I-Terminal 1" | V_src = root.comp1.es.V0_1; Connections = 2

Multiphysics
  asb1: AcousticStructureBoundary on all boundaries | Acoustics_physics = actd; Structure_physics = solid
  pze1: PiezoelectricEffect on all domains
    InitializePiezoCoupling = 1
    Solid_physics = solid
    Electrostatics_physics = es

Mesh
  mesh1 "Mesh 1"
    size: MeshSizeDefault | hmax = water_cp/fmax/5; hmin = 0.00135; hcurve = 0.2; custom = on
    map2: Map "Mapped 2" on domains 1
      size1: Size on domains 1 | hmax = min(1[mm]/3,pzt_cs/fmax/5); custom = on
    ftri1: FreeTri "Free Triangular 1" on domains 2
    map1: Map "Mapped 1" on remaining entities
      dis1: Distribution on boundaries 10 | numelem = 6

Studies
  std1 "Study 1"
    time: Transient "Time Dependent" | tlist = range(0,T0/6,65[us])

Solver configurations
  sol1 "Solution 1" (study std1)
    v1: Variables "Dependent Variables 1"
      comp1_u: Field "Displacement field (comp1.u)" | scalemethod = manual; scaleval = 1e-2*0.0212190951739
    t1: Time "Time-Dependent Solver 1"
      tlist = range(0,T0/6,65[us])
      rtol = 1.0E-4
      timemethod = genalpha
      initialstepbdf = min(min(1/(100*fmax),1/(100*fmax)),1/(100*fmax))
      maxstepconstraintbdf = const
      maxstepbdf = min(min(min(1e100,1/(30*fmax)),1/(30*fmax)),1/(30*fmax))
      maxorder = 2
      timestepbdf = min(1/(60*fmax),min(1/(60*fmax),1/(60*fmax)))
      tstepsgenalpha = manual
      initialstepgenalpha = min(min(1/(100*fmax),1/(100*fmax)),1/(100*fmax))
      maxstepconstraintgenalpha = const
      maxstepgenalpha = min(min(min(1e100,1/(30*fmax)),1/(30*fmax)),1/(30*fmax))
      timestepgenalpha = min(1/(60*fmax),min(1/(60*fmax),1/(60*fmax)))
      dDef: Direct
      fc1: FullyCoupled | linsolver = dDef

Datasets
  dset1: Solution "soln1" on domains 1, 2 | solution = sol1
  rev1: Revolve2D "rev 2d 1" | data = dset1; startangle = -90; revangle = 225
  rev2: Revolve2D "rev 2d 2" | data = dset1; startangle = -90; revangle = 225
  rev3: Revolve2D "rev 2d 3" | data = dset1
  dset2: Solution "probe soln2" | solution = sol1
  avh1: Average "Point Probe 1" on points 2 | data = dset2

Derived values
  pev1: EvalPoint "Point Probe 1" | data = avh1; table = tbl1; expr = actd.p_t
  gev1: EvalGlobal "Global Variable Probe 1" | data = dset2; table = tbl2; expr = es.V0_1

Tables
  tbl1: Table
    Time (s) | Total acoustic pressure (Pa), Point Probe 1
    0 | -7.70001e-18
    1.66667e-08 | -0.340197
    3.33333e-08 | -1.58441
    5e-08 | -3.60044
    6.66667e-08 | -5.55821
    8.33333e-08 | -6.96172
    1e-07 | -8.05591
    1.16667e-07 | -9.25804
    1.33333e-07 | -10.6753
    1.5e-07 | -12.3285
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  tbl2: Table
    Time (s) | Terminal voltage (V)
    0 | 2.57894e-09
    1.66667e-08 | 0.00127256
    3.33333e-08 | 0.00250858
    5e-08 | 0.00371718
    6.66667e-08 | 0.00492746
    8.33333e-08 | 0.00615734
    1e-07 | 0.00740915
    1.16667e-07 | 0.0086893
    1.33333e-07 | 0.0100171
    1.5e-07 | 0.011411
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
Plots
  pg1: PlotGroup2D "acoustic pressure waves in water domain" | data = dset1
    surf1: Surface | expr = actd.p_t
  pg2: PlotGroup3D "acoustic pressure waves in water domain 3d" | data = rev1
    surf1: Surface | expr = actd.p_t
  pg3: PlotGroup2D "stress 2d plot" | data = dset1
    surf1: Surface | expr = solid.mises
      def: Deform "Deformation" | expr = {u, w}
  pg4: PlotGroup3D "stress 3d plot" | data = rev2
    surf1: Surface | expr = solid.mises
      def: Deform "Deformation" | revcoordsys = cylindrical; expr = {u, 0, w}; descr = Displacement field
  pg5: PlotGroup2D "potential heatmap 2d" | data = dset1
    surf1: Surface | expr = V
  pg6: PlotGroup3D "potential plotted in 3d" | data = rev3
    surf1: Surface | expr = V
  pg7: PlotGroup1D "pressure at r=0 (surface)"
    data = none
    xlabel = Time (s)
    ylabel = Total acoustic pressure (Pa), Point Probe 1
    tblp1: Table "Probe Table Graph 1" | table = tbl1
  pg8: PlotGroup1D "terminal voltage"
    tblp1: Table "Probe Table Graph 1" | table = tbl2

Exports
  anim1: Animation | giffilename = C:\Users\kunal\Desktop\electronics project\gaussian input\stress.gif
  anim3: Animation | target = player
  anim4: Animation | target = player
  anim5: Animation | target = player
  anim6: Animation | giffilename = C:\Users\kunal\Desktop\V_1 waves.gif